// SBML level 2 version 4

function Constant_flux__irreversible(v)
  v;
end
Constant_flux__irreversible is "Constant flux (irreversible)";

model New_Model()

  // Compartments:
  compartment compartment = 1;

  // Species:
  substanceOnly species X in compartment = 2;
  substanceOnly species Y in compartment = 10;

  // Parameters:
  A = 1;
  B = 4;

  // Reactions:
  r2: Y + 2 X => 3 X; compartment*r2_k1*X^2*Y;
    r2_k1 = 1;
  r3: X => Y; compartment*B*X;
  r4: X => ; compartment*r4_k1*X;
    r4_k1 = 1;
  r1: => X; compartment*Constant_flux__irreversible(A);

  // Unit definitions:
  unit length = metre;
  unit area = metre^2;
  unit volume = litre;
  unit time = second;
  unit substance = mole;
end
